##############################
###############
# Micro Units #
###############
#
# Length      -> micron
# Mass   	  -> picogram
# Time 	 	  -> microsecond
# Temperature -> Kelvin
#
##############################

################################################

variable 			R_min equal 500/2
variable 			R_max equal 3200/2

################################################

### Initialization

# log name
variable 			log_name string log2.liggghts

# Variables

# Simulation domain, [m]*10^6 => [micron]
variable 			dom_radius equal 0.0155e6
variable 			zlo equal -0.002e6
variable 			zhi equal 0.018e6

# Cylinder wall dimensions
variable 			cylin_radius equal 0.011e6

# Young Modulus, [kg*m-1*s-1]*10^-3 => [picogram*micron-1*microsecond-1]
# 250 GPa
variable 			E_MgO equal 2.5e5
variable 			E_Al2O3 equal 2.5e5
variable 			E_stainlessSteel equal 2e5

# Cohesion Energy Density, [J*m-3]*10^-3 == [kg*m-1*s-2]*10^-3 => [picogram*micron-1*microsecond-2]
# 3e6 J*m-3
variable 			CED_MgO equal 3000000e-3
variable 			CED_Al2O3 equal 3000000e-3
variable 			CED_stainlessSteel equal 3000000e-3

# Spheres, [m]*10^6 => [micron]
variable 			rho_MgO equal 3500e-3
variable 			rho_Al2O3 equal 3000e-3
variable            rho_stainlessSteel equal 8000e-3
variable 			nu_Al2O3 equal 0.25
variable 			nu_MgO equal 0.25
variable            nu_stainlessSteel equal 0.29

# Neighbor extra distance beyond force cutoff
variable 			skin equal 2*${R_min}

# Plate, [m]*10^6 => [micron]
variable 			radius equal 0.015e6
variable 			h_plate equal 0.008e6

# Factory domain, [m]*10^6 => [micron]
variable 			z_lo2 equal ${R_max}
variable 			z_hi2 equal 1.6*${z_lo2}+(${radius}^2*${h_plate})/((${radius}-${R_max})^2)
variable 			z_press equal ceil(${z_hi2}+${R_max})
variable 			R_in equal ${radius}-${R_max}

# Plate, [m]*10^6 => [micron]
variable 			scale equal 1e3

# Max press force [N]
variable 			com equal 0.03e6    # center of mass
variable 			target_force equal 100000  # 100kN

# Gravity, [m*s-2]*10^-6 => [micron*microsecond-2]
variable 			gravity equal 9.81e-6

# Shear modulus
variable 			shear_modulus equal ${E_Al2O3}/(2*(1+${nu_Al2O3}))

# Rayleigh time [microseconds]
variable 			rayleigh_time equal 3.141592*${R_min}*(sqrt(${rho_Al2O3}/${shear_modulus})/(0.1631*${nu_stainlessSteel}+0.8766))

# TimeStep
variable 			timestep equal 0.1*${rayleigh_time}

# Press velocity, [m*s-1] => [micron*microsecond-1]
#variable 			pressVel equal -1.666666666e-5
variable 			pressVel equal -0.05
# Press displacement [mm]
variable 			press_displace equal 1
# Time spent in displacement [s]
variable 			t_displace equal ${press_displace}*10^-3/abs(${pressVel})


# timeSteps for one simulation second
variable 			tsInAsecond equal 1e6/${timestep}

# Dump every ... (fps => frames per second in animation)
variable 			100fps equal ceil(${tsInAsecond}/100)
variable 			1000fps equal ceil(${tsInAsecond}/1000)
variable 			30fps equal ceil(${tsInAsecond}/30)


###########################################################
# Cuantos segundos dura la simulacion?
variable 			run1 equal ceil(${t_displace}*${tsInAsecond})
# Procentaje en volumen de insercion en factory2
variable 			per equal 0.8
###########################################################


# Preliminaries
units				micro
atom_style			sphere
atom_modify			map array
boundary 			f f f
newton 				off
communicate			single vel yes
processors			* * 1   # Distribute processes within XY plane

# Declare domain
region				domain cylinder z 0 0 ${dom_radius} ${zlo} ${zhi} units box
read_restart 		poly.restart

# log name
log 				${log_name} append

# Neighbor listing
neighbor 			${skin} bin
neigh_modify		delay 0


### Setup
# Material and interaction properties required
fix 				m1 all property/global youngsModulus peratomtype ${E_MgO} ${E_Al2O3} ${E_stainlessSteel}
fix 				m2 all property/global poissonsRatio peratomtype ${nu_MgO} ${nu_Al2O3} ${nu_stainlessSteel}
fix 				m3 all property/global coefficientRestitution peratomtypepair 3 0.5 0.5 0.5 0.5 0.5 0.5 0.5 0.5 0.5
fix 				m4 all property/global coefficientFriction peratomtypepair 3 0.2 0.2 0.2 0.2 0.2 0.2 0.2 0.2 0.2
fix 				m6 all property/global cohesionEnergyDensity peratomtypepair 3 ${CED_MgO} ${CED_MgO} ${CED_MgO} ${CED_MgO} ${CED_MgO} ${CED_MgO} ${CED_MgO} ${CED_MgO} ${CED_MgO}


# Import mesh from cad:
fix 				cad0 all mesh/surface file meshes/base0.stl type 3 scale ${scale}
fix 				cad1 all mesh/surface file meshes/plato_8mm_22mm.stl type 3 scale ${scale}
fix 				press all mesh/surface/stress file meshes/prensa_22mm_0.stl type 3 scale ${scale} move 0 0 ${z_press} stress on
fix 				move all move/mesh mesh press linear 0. 0. ${pressVel}

# Forces on press face
# [picogram*micron*microsecond-2]*10^-9 => [kg*m*s-2] == [N]
variable 			ForceX equal ceil(f_press[1]*1e-9)
variable 			ForceY equal ceil(f_press[2]*1e-9)
variable 			ForceZ equal ceil(f_press[3]*1e-9)

# Wall position [mm]
variable 			WallZ  equal (f_press[9]*1e-3)

# Use the imported mesh as granular wall
fix 				granwalls all wall/gran model hertz tangential history  mesh n_meshes 3 meshes cad0 cad1 press

# Cylinder wall
fix 				cylinder_wall all wall/gran model hertz tangential history primitive type 3 zcylinder ${cylin_radius} 0 0

# Define the physics
pair_style 			gran model hertz tangential history cohesion sjkr
pair_coeff			* *

# Integrator
fix					integrate all nve/sphere

# Gravity
fix 				grav all gravity ${gravity} vector 0.0 0.0 -1.0

# Time step
timestep 			${timestep}

# Thermodynamic output settings
thermo_style		custom step atoms ke time cpu
thermo 				1000
thermo_modify 		norm no lost ignore  # ignore lost particles

# Restart doc; replace itself everytime
restart 			${1000fps} poly.restart poly.restart

# Check RayleighTime and HertzTime every 1000 steps if > 0.2
fix 				ctg all check/timestep/gran 1000 0.2 0.2
run 1
#unfix				ctg

# Initialize dump files
dump				dmp all custom ${1000fps} post/dump*.pruebas id type x y z ix iy iz vx vy vz fx fy fz omegax omegay omegaz radius mass
fix 				dumpText all print 200 "${ForceX} ${ForceY} ${ForceZ} ${WallZ}" screen no title "Fx[N] Fy[N] Fz[N] Z[mm]" file fuerzasPrensa2.txt
dump 				dmpstl all mesh/stl ${1000fps} post/dump*.stl

#run

#run 				${run1}
run 				1
